// SBML level 2 version 1
// Created by BioNetGen UNKNOWN

model model1()
  // multisite2

  // Compartments:
  compartment cell = 1;

  // Species:
  species R_a in cell = 5360; R_a is "R(a)";
  species L_a in cell = 1160; L_a is "L(a)";
  species A_p1_U_p2_U_p3_U in cell = 5360; A_p1_U_p2_U_p3_U is "A(p1~U,p2~U,p3~U)";
  species A_p1_U_1_p2_U_p3_U_R_a_1 in cell = 0; A_p1_U_1_p2_U_p3_U_R_a_1 is "A(p1~U!1,p2~U,p3~U).R(a!1)";
  species A_p1_U_p2_U_1_p3_U_R_a_1 in cell = 0; A_p1_U_p2_U_1_p3_U_R_a_1 is "A(p1~U,p2~U!1,p3~U).R(a!1)";
  species A_p1_U_p2_U_p3_U_1_R_a_1 in cell = 0; A_p1_U_p2_U_p3_U_1_R_a_1 is "A(p1~U,p2~U,p3~U!1).R(a!1)";
  species A_p1_U_1_p2_U_2_p3_U_R_a_1_R_a_2 in cell = 0; A_p1_U_1_p2_U_2_p3_U_R_a_1_R_a_2 is "A(p1~U!1,p2~U!2,p3~U).R(a!1).R(a!2)";
  species A_p1_U_1_p2_U_p3_U_2_R_a_1_R_a_2 in cell = 0; A_p1_U_1_p2_U_p3_U_2_R_a_1_R_a_2 is "A(p1~U!1,p2~U,p3~U!2).R(a!1).R(a!2)";
  species A_p1_P_p2_U_p3_U in cell = 0; A_p1_P_p2_U_p3_U is "A(p1~P,p2~U,p3~U)";
  species A_p1_U_p2_U_1_p3_U_2_R_a_1_R_a_2 in cell = 0; A_p1_U_p2_U_1_p3_U_2_R_a_1_R_a_2 is "A(p1~U,p2~U!1,p3~U!2).R(a!1).R(a!2)";
  species A_p1_U_p2_P_p3_U in cell = 0; A_p1_U_p2_P_p3_U is "A(p1~U,p2~P,p3~U)";
  species A_p1_U_p2_U_p3_P in cell = 0; A_p1_U_p2_U_p3_P is "A(p1~U,p2~U,p3~P)";
  species S13 in cell = 0; S13 is "A(p1~U!1,p2~U!2,p3~U!3).R(a!1).R(a!2).R(a!3)";
  species A_p1_U_1_p2_P_p3_U_R_a_1 in cell = 0; A_p1_U_1_p2_P_p3_U_R_a_1 is "A(p1~U!1,p2~P,p3~U).R(a!1)";
  species A_p1_U_1_p2_U_p3_P_R_a_1 in cell = 0; A_p1_U_1_p2_U_p3_P_R_a_1 is "A(p1~U!1,p2~U,p3~P).R(a!1)";
  species A_p1_P_p2_U_1_p3_U_R_a_1 in cell = 0; A_p1_P_p2_U_1_p3_U_R_a_1 is "A(p1~P,p2~U!1,p3~U).R(a!1)";
  species A_p1_P_p2_U_p3_U_1_R_a_1 in cell = 0; A_p1_P_p2_U_p3_U_1_R_a_1 is "A(p1~P,p2~U,p3~U!1).R(a!1)";
  species A_p1_P_1_p2_U_p3_U_L_a_1 in cell = 0; A_p1_P_1_p2_U_p3_U_L_a_1 is "A(p1~P!1,p2~U,p3~U).L(a!1)";
  species A_p1_U_p2_U_1_p3_P_R_a_1 in cell = 0; A_p1_U_p2_U_1_p3_P_R_a_1 is "A(p1~U,p2~U!1,p3~P).R(a!1)";
  species A_p1_U_p2_P_p3_U_1_R_a_1 in cell = 0; A_p1_U_p2_P_p3_U_1_R_a_1 is "A(p1~U,p2~P,p3~U!1).R(a!1)";
  species A_p1_U_p2_P_1_p3_U_L_a_1 in cell = 0; A_p1_U_p2_P_1_p3_U_L_a_1 is "A(p1~U,p2~P!1,p3~U).L(a!1)";
  species A_p1_U_p2_U_p3_P_1_L_a_1 in cell = 0; A_p1_U_p2_U_p3_P_1_L_a_1 is "A(p1~U,p2~U,p3~P!1).L(a!1)";
  species A_p1_U_1_p2_U_2_p3_P_R_a_1_R_a_2 in cell = 0; A_p1_U_1_p2_U_2_p3_P_R_a_1_R_a_2 is "A(p1~U!1,p2~U!2,p3~P).R(a!1).R(a!2)";
  species A_p1_U_1_p2_P_p3_U_2_R_a_1_R_a_2 in cell = 0; A_p1_U_1_p2_P_p3_U_2_R_a_1_R_a_2 is "A(p1~U!1,p2~P,p3~U!2).R(a!1).R(a!2)";
  species A_p1_U_1_p2_P_2_p3_U_L_a_2_R_a_1 in cell = 0; A_p1_U_1_p2_P_2_p3_U_L_a_2_R_a_1 is "A(p1~U!1,p2~P!2,p3~U).L(a!2).R(a!1)";
  species A_p1_U_1_p2_U_p3_P_2_L_a_2_R_a_1 in cell = 0; A_p1_U_1_p2_U_p3_P_2_L_a_2_R_a_1 is "A(p1~U!1,p2~U,p3~P!2).L(a!2).R(a!1)";
  species A_p1_P_p2_U_1_p3_U_2_R_a_1_R_a_2 in cell = 0; A_p1_P_p2_U_1_p3_U_2_R_a_1_R_a_2 is "A(p1~P,p2~U!1,p3~U!2).R(a!1).R(a!2)";
  species A_p1_P_p2_P_p3_U in cell = 0; A_p1_P_p2_P_p3_U is "A(p1~P,p2~P,p3~U)";
  species A_p1_P_p2_U_p3_P in cell = 0; A_p1_P_p2_U_p3_P is "A(p1~P,p2~U,p3~P)";
  species A_p1_P_1_p2_U_2_p3_U_L_a_1_R_a_2 in cell = 0; A_p1_P_1_p2_U_2_p3_U_L_a_1_R_a_2 is "A(p1~P!1,p2~U!2,p3~U).L(a!1).R(a!2)";
  species A_p1_P_1_p2_U_p3_U_2_L_a_1_R_a_2 in cell = 0; A_p1_P_1_p2_U_p3_U_2_L_a_1_R_a_2 is "A(p1~P!1,p2~U,p3~U!2).L(a!1).R(a!2)";
  species A_p1_U_p2_U_1_p3_P_2_L_a_2_R_a_1 in cell = 0; A_p1_U_p2_U_1_p3_P_2_L_a_2_R_a_1 is "A(p1~U,p2~U!1,p3~P!2).L(a!2).R(a!1)";
  species A_p1_U_p2_P_p3_P in cell = 0; A_p1_U_p2_P_p3_P is "A(p1~U,p2~P,p3~P)";
  species A_p1_U_p2_P_1_p3_U_2_L_a_1_R_a_2 in cell = 0; A_p1_U_p2_P_1_p3_U_2_L_a_1_R_a_2 is "A(p1~U,p2~P!1,p3~U!2).L(a!1).R(a!2)";
  species S35 in cell = 0; S35 is "A(p1~U!1,p2~U!2,p3~P!3).L(a!3).R(a!1).R(a!2)";
  species A_p1_U_1_p2_P_p3_P_R_a_1 in cell = 0; A_p1_U_1_p2_P_p3_P_R_a_1 is "A(p1~U!1,p2~P,p3~P).R(a!1)";
  species S37 in cell = 0; S37 is "A(p1~U!1,p2~P!2,p3~U!3).L(a!2).R(a!1).R(a!3)";
  species A_p1_P_p2_U_1_p3_P_R_a_1 in cell = 0; A_p1_P_p2_U_1_p3_P_R_a_1 is "A(p1~P,p2~U!1,p3~P).R(a!1)";
  species A_p1_P_p2_P_p3_U_1_R_a_1 in cell = 0; A_p1_P_p2_P_p3_U_1_R_a_1 is "A(p1~P,p2~P,p3~U!1).R(a!1)";
  species A_p1_P_p2_P_1_p3_U_L_a_1 in cell = 0; A_p1_P_p2_P_1_p3_U_L_a_1 is "A(p1~P,p2~P!1,p3~U).L(a!1)";
  species A_p1_P_p2_U_p3_P_1_L_a_1 in cell = 0; A_p1_P_p2_U_p3_P_1_L_a_1 is "A(p1~P,p2~U,p3~P!1).L(a!1)";
  species S42 in cell = 0; S42 is "A(p1~P!1,p2~U!2,p3~U!3).L(a!1).R(a!2).R(a!3)";
  species A_p1_P_1_p2_P_p3_U_L_a_1 in cell = 0; A_p1_P_1_p2_P_p3_U_L_a_1 is "A(p1~P!1,p2~P,p3~U).L(a!1)";
  species A_p1_P_1_p2_U_p3_P_L_a_1 in cell = 0; A_p1_P_1_p2_U_p3_P_L_a_1 is "A(p1~P!1,p2~U,p3~P).L(a!1)";
  species A_p1_U_p2_P_p3_P_1_L_a_1 in cell = 0; A_p1_U_p2_P_p3_P_1_L_a_1 is "A(p1~U,p2~P,p3~P!1).L(a!1)";
  species A_p1_U_p2_P_1_p3_P_L_a_1 in cell = 0; A_p1_U_p2_P_1_p3_P_L_a_1 is "A(p1~U,p2~P!1,p3~P).L(a!1)";
  species A_p1_U_1_p2_P_p3_P_2_L_a_2_R_a_1 in cell = 0; A_p1_U_1_p2_P_p3_P_2_L_a_2_R_a_1 is "A(p1~U!1,p2~P,p3~P!2).L(a!2).R(a!1)";
  species A_p1_U_1_p2_P_2_p3_P_L_a_2_R_a_1 in cell = 0; A_p1_U_1_p2_P_2_p3_P_L_a_2_R_a_1 is "A(p1~U!1,p2~P!2,p3~P).L(a!2).R(a!1)";
  species A_p1_P_p2_U_1_p3_P_2_L_a_2_R_a_1 in cell = 0; A_p1_P_p2_U_1_p3_P_2_L_a_2_R_a_1 is "A(p1~P,p2~U!1,p3~P!2).L(a!2).R(a!1)";
  species A_p1_P_p2_P_p3_P in cell = 0; A_p1_P_p2_P_p3_P is "A(p1~P,p2~P,p3~P)";
  species A_p1_P_p2_P_1_p3_U_2_L_a_1_R_a_2 in cell = 0; A_p1_P_p2_P_1_p3_U_2_L_a_1_R_a_2 is "A(p1~P,p2~P!1,p3~U!2).L(a!1).R(a!2)";
  species A_p1_P_1_p2_U_2_p3_P_L_a_1_R_a_2 in cell = 0; A_p1_P_1_p2_U_2_p3_P_L_a_1_R_a_2 is "A(p1~P!1,p2~U!2,p3~P).L(a!1).R(a!2)";
  species A_p1_P_1_p2_P_p3_U_2_L_a_1_R_a_2 in cell = 0; A_p1_P_1_p2_P_p3_U_2_L_a_1_R_a_2 is "A(p1~P!1,p2~P,p3~U!2).L(a!1).R(a!2)";
  species A_p1_P_1_p2_P_2_p3_U_L_a_1_L_a_2 in cell = 0; A_p1_P_1_p2_P_2_p3_U_L_a_1_L_a_2 is "A(p1~P!1,p2~P!2,p3~U).L(a!1).L(a!2)";
  species A_p1_P_1_p2_U_p3_P_2_L_a_1_L_a_2 in cell = 0; A_p1_P_1_p2_U_p3_P_2_L_a_1_L_a_2 is "A(p1~P!1,p2~U,p3~P!2).L(a!1).L(a!2)";
  species A_p1_U_p2_P_1_p3_P_2_L_a_1_L_a_2 in cell = 0; A_p1_U_p2_P_1_p3_P_2_L_a_1_L_a_2 is "A(p1~U,p2~P!1,p3~P!2).L(a!1).L(a!2)";
  species S57 in cell = 0; S57 is "A(p1~U!1,p2~P!2,p3~P!3).L(a!2).L(a!3).R(a!1)";
  species A_p1_P_p2_P_p3_P_1_L_a_1 in cell = 0; A_p1_P_p2_P_p3_P_1_L_a_1 is "A(p1~P,p2~P,p3~P!1).L(a!1)";
  species A_p1_P_p2_P_1_p3_P_L_a_1 in cell = 0; A_p1_P_p2_P_1_p3_P_L_a_1 is "A(p1~P,p2~P!1,p3~P).L(a!1)";
  species S60 in cell = 0; S60 is "A(p1~P!1,p2~U!2,p3~P!3).L(a!1).L(a!3).R(a!2)";
  species A_p1_P_1_p2_P_p3_P_L_a_1 in cell = 0; A_p1_P_1_p2_P_p3_P_L_a_1 is "A(p1~P!1,p2~P,p3~P).L(a!1)";
  species S62 in cell = 0; S62 is "A(p1~P!1,p2~P!2,p3~U!3).L(a!1).L(a!2).R(a!3)";
  species A_p1_P_p2_P_1_p3_P_2_L_a_1_L_a_2 in cell = 0; A_p1_P_p2_P_1_p3_P_2_L_a_1_L_a_2 is "A(p1~P,p2~P!1,p3~P!2).L(a!1).L(a!2)";
  species A_p1_P_1_p2_P_p3_P_2_L_a_1_L_a_2 in cell = 0; A_p1_P_1_p2_P_p3_P_2_L_a_1_L_a_2 is "A(p1~P!1,p2~P,p3~P!2).L(a!1).L(a!2)";
  species A_p1_P_1_p2_P_2_p3_P_L_a_1_L_a_2 in cell = 0; A_p1_P_1_p2_P_2_p3_P_L_a_1_L_a_2 is "A(p1~P!1,p2~P!2,p3~P).L(a!1).L(a!2)";
  species S66 in cell = 0; S66 is "A(p1~P!1,p2~P!2,p3~P!3).L(a!1).L(a!2).L(a!3)";

  // Parameters:
  Rtot = 5360;
  Ltot = 1160;
  Atot = 5360;
  kOnR = 0.01;
  kOffR = 0.1;
  kCatR = 5;
  kOnL = 0.01;
  kOffL = 0.1;
  kCatL = 5.1;

  // Assignment rules:
  Group_Rfree := 0 + R_a;
  Group_Lfree := 0 + L_a;
  Group_A1P := A_p1_P_p2_U_p3_U + A_p1_P_p2_U_1_p3_U_R_a_1 + A_p1_P_p2_U_p3_U_1_R_a_1 + A_p1_P_1_p2_U_p3_U_L_a_1 + A_p1_P_p2_U_1_p3_U_2_R_a_1_R_a_2 + A_p1_P_p2_P_p3_U + A_p1_P_p2_U_p3_P + A_p1_P_1_p2_U_2_p3_U_L_a_1_R_a_2 + A_p1_P_1_p2_U_p3_U_2_L_a_1_R_a_2 + A_p1_P_p2_U_1_p3_P_R_a_1 + A_p1_P_p2_P_p3_U_1_R_a_1 + A_p1_P_p2_P_1_p3_U_L_a_1 + A_p1_P_p2_U_p3_P_1_L_a_1 + S42 + A_p1_P_1_p2_P_p3_U_L_a_1 + A_p1_P_1_p2_U_p3_P_L_a_1 + A_p1_P_p2_U_1_p3_P_2_L_a_2_R_a_1 + A_p1_P_p2_P_p3_P + A_p1_P_p2_P_1_p3_U_2_L_a_1_R_a_2 + A_p1_P_1_p2_U_2_p3_P_L_a_1_R_a_2 + A_p1_P_1_p2_P_p3_U_2_L_a_1_R_a_2 + A_p1_P_1_p2_P_2_p3_U_L_a_1_L_a_2 + A_p1_P_1_p2_U_p3_P_2_L_a_1_L_a_2 + A_p1_P_p2_P_p3_P_1_L_a_1 + A_p1_P_p2_P_1_p3_P_L_a_1 + S60 + A_p1_P_1_p2_P_p3_P_L_a_1 + S62 + A_p1_P_p2_P_1_p3_P_2_L_a_1_L_a_2 + A_p1_P_1_p2_P_p3_P_2_L_a_1_L_a_2 + A_p1_P_1_p2_P_2_p3_P_L_a_1_L_a_2 + S66;

  // Reactions:
  R1: R_a + A_p1_U_p2_U_p3_U => A_p1_U_1_p2_U_p3_U_R_a_1; cell*kOnR*R_a*A_p1_U_p2_U_p3_U;
  R2: R_a + A_p1_U_p2_U_p3_U => A_p1_U_p2_U_1_p3_U_R_a_1; cell*kOnR*R_a*A_p1_U_p2_U_p3_U;
  R3: R_a + A_p1_U_p2_U_p3_U => A_p1_U_p2_U_p3_U_1_R_a_1; cell*kOnR*R_a*A_p1_U_p2_U_p3_U;
  R4: R_a + A_p1_U_p2_U_1_p3_U_R_a_1 => A_p1_U_1_p2_U_2_p3_U_R_a_1_R_a_2; cell*kOnR*R_a*A_p1_U_p2_U_1_p3_U_R_a_1;
  R5: R_a + A_p1_U_p2_U_p3_U_1_R_a_1 => A_p1_U_1_p2_U_p3_U_2_R_a_1_R_a_2; cell*kOnR*R_a*A_p1_U_p2_U_p3_U_1_R_a_1;
  R6: A_p1_U_1_p2_U_p3_U_R_a_1 => R_a + A_p1_U_p2_U_p3_U; cell*kOffR*A_p1_U_1_p2_U_p3_U_R_a_1;
  R7: A_p1_U_1_p2_U_p3_U_R_a_1 => R_a + A_p1_P_p2_U_p3_U; cell*kCatR*A_p1_U_1_p2_U_p3_U_R_a_1;
  R8: R_a + A_p1_U_1_p2_U_p3_U_R_a_1 => A_p1_U_1_p2_U_2_p3_U_R_a_1_R_a_2; cell*kOnR*R_a*A_p1_U_1_p2_U_p3_U_R_a_1;
  R9: R_a + A_p1_U_p2_U_p3_U_1_R_a_1 => A_p1_U_p2_U_1_p3_U_2_R_a_1_R_a_2; cell*kOnR*R_a*A_p1_U_p2_U_p3_U_1_R_a_1;
  R10: A_p1_U_p2_U_1_p3_U_R_a_1 => R_a + A_p1_U_p2_U_p3_U; cell*kOffR*A_p1_U_p2_U_1_p3_U_R_a_1;
  R11: A_p1_U_p2_U_1_p3_U_R_a_1 => R_a + A_p1_U_p2_P_p3_U; cell*kCatR*A_p1_U_p2_U_1_p3_U_R_a_1;
  R12: R_a + A_p1_U_1_p2_U_p3_U_R_a_1 => A_p1_U_1_p2_U_p3_U_2_R_a_1_R_a_2; cell*kOnR*R_a*A_p1_U_1_p2_U_p3_U_R_a_1;
  R13: R_a + A_p1_U_p2_U_1_p3_U_R_a_1 => A_p1_U_p2_U_1_p3_U_2_R_a_1_R_a_2; cell*kOnR*R_a*A_p1_U_p2_U_1_p3_U_R_a_1;
  R14: A_p1_U_p2_U_p3_U_1_R_a_1 => R_a + A_p1_U_p2_U_p3_U; cell*kOffR*A_p1_U_p2_U_p3_U_1_R_a_1;
  R15: A_p1_U_p2_U_p3_U_1_R_a_1 => R_a + A_p1_U_p2_U_p3_P; cell*kCatR*A_p1_U_p2_U_p3_U_1_R_a_1;
  R16: R_a + A_p1_U_p2_U_1_p3_U_2_R_a_1_R_a_2 => S13; cell*kOnR*R_a*A_p1_U_p2_U_1_p3_U_2_R_a_1_R_a_2;
  R17: R_a + A_p1_U_p2_P_p3_U => A_p1_U_1_p2_P_p3_U_R_a_1; cell*kOnR*R_a*A_p1_U_p2_P_p3_U;
  R18: R_a + A_p1_U_p2_U_p3_P => A_p1_U_1_p2_U_p3_P_R_a_1; cell*kOnR*R_a*A_p1_U_p2_U_p3_P;
  R19: A_p1_U_1_p2_U_2_p3_U_R_a_1_R_a_2 => R_a + A_p1_U_p2_U_1_p3_U_R_a_1; cell*kOffR*A_p1_U_1_p2_U_2_p3_U_R_a_1_R_a_2;
  R20: A_p1_U_1_p2_U_p3_U_2_R_a_1_R_a_2 => R_a + A_p1_U_p2_U_p3_U_1_R_a_1; cell*kOffR*A_p1_U_1_p2_U_p3_U_2_R_a_1_R_a_2;
  R21: A_p1_U_1_p2_U_2_p3_U_R_a_1_R_a_2 => R_a + A_p1_P_p2_U_1_p3_U_R_a_1; cell*kCatR*A_p1_U_1_p2_U_2_p3_U_R_a_1_R_a_2;
  R22: A_p1_U_1_p2_U_p3_U_2_R_a_1_R_a_2 => R_a + A_p1_P_p2_U_p3_U_1_R_a_1; cell*kCatR*A_p1_U_1_p2_U_p3_U_2_R_a_1_R_a_2;
  R23: L_a + A_p1_P_p2_U_p3_U => A_p1_P_1_p2_U_p3_U_L_a_1; cell*kOnL*L_a*A_p1_P_p2_U_p3_U;
  R24: R_a + A_p1_U_1_p2_U_p3_U_2_R_a_1_R_a_2 => S13; cell*kOnR*R_a*A_p1_U_1_p2_U_p3_U_2_R_a_1_R_a_2;
  R25: R_a + A_p1_P_p2_U_p3_U => A_p1_P_p2_U_1_p3_U_R_a_1; cell*kOnR*R_a*A_p1_P_p2_U_p3_U;
  R26: R_a + A_p1_U_p2_U_p3_P => A_p1_U_p2_U_1_p3_P_R_a_1; cell*kOnR*R_a*A_p1_U_p2_U_p3_P;
  R27: A_p1_U_1_p2_U_2_p3_U_R_a_1_R_a_2 => R_a + A_p1_U_1_p2_U_p3_U_R_a_1; cell*kOffR*A_p1_U_1_p2_U_2_p3_U_R_a_1_R_a_2;
  R28: A_p1_U_p2_U_1_p3_U_2_R_a_1_R_a_2 => R_a + A_p1_U_p2_U_p3_U_1_R_a_1; cell*kOffR*A_p1_U_p2_U_1_p3_U_2_R_a_1_R_a_2;
  R29: A_p1_U_1_p2_U_2_p3_U_R_a_1_R_a_2 => R_a + A_p1_U_1_p2_P_p3_U_R_a_1; cell*kCatR*A_p1_U_1_p2_U_2_p3_U_R_a_1_R_a_2;
  R30: A_p1_U_p2_U_1_p3_U_2_R_a_1_R_a_2 => R_a + A_p1_U_p2_P_p3_U_1_R_a_1; cell*kCatR*A_p1_U_p2_U_1_p3_U_2_R_a_1_R_a_2;
  R31: L_a + A_p1_U_p2_P_p3_U => A_p1_U_p2_P_1_p3_U_L_a_1; cell*kOnL*L_a*A_p1_U_p2_P_p3_U;
  R32: R_a + A_p1_U_1_p2_U_2_p3_U_R_a_1_R_a_2 => S13; cell*kOnR*R_a*A_p1_U_1_p2_U_2_p3_U_R_a_1_R_a_2;
  R33: R_a + A_p1_P_p2_U_p3_U => A_p1_P_p2_U_p3_U_1_R_a_1; cell*kOnR*R_a*A_p1_P_p2_U_p3_U;
  R34: R_a + A_p1_U_p2_P_p3_U => A_p1_U_p2_P_p3_U_1_R_a_1; cell*kOnR*R_a*A_p1_U_p2_P_p3_U;
  R35: A_p1_U_1_p2_U_p3_U_2_R_a_1_R_a_2 => R_a + A_p1_U_1_p2_U_p3_U_R_a_1; cell*kOffR*A_p1_U_1_p2_U_p3_U_2_R_a_1_R_a_2;
  R36: A_p1_U_p2_U_1_p3_U_2_R_a_1_R_a_2 => R_a + A_p1_U_p2_U_1_p3_U_R_a_1; cell*kOffR*A_p1_U_p2_U_1_p3_U_2_R_a_1_R_a_2;
  R37: A_p1_U_1_p2_U_p3_U_2_R_a_1_R_a_2 => R_a + A_p1_U_1_p2_U_p3_P_R_a_1; cell*kCatR*A_p1_U_1_p2_U_p3_U_2_R_a_1_R_a_2;
  R38: A_p1_U_p2_U_1_p3_U_2_R_a_1_R_a_2 => R_a + A_p1_U_p2_U_1_p3_P_R_a_1; cell*kCatR*A_p1_U_p2_U_1_p3_U_2_R_a_1_R_a_2;
  R39: L_a + A_p1_U_p2_U_p3_P => A_p1_U_p2_U_p3_P_1_L_a_1; cell*kOnL*L_a*A_p1_U_p2_U_p3_P;
  R40: R_a + A_p1_U_p2_U_1_p3_P_R_a_1 => A_p1_U_1_p2_U_2_p3_P_R_a_1_R_a_2; cell*kOnR*R_a*A_p1_U_p2_U_1_p3_P_R_a_1;
  R41: R_a + A_p1_U_p2_P_p3_U_1_R_a_1 => A_p1_U_1_p2_P_p3_U_2_R_a_1_R_a_2; cell*kOnR*R_a*A_p1_U_p2_P_p3_U_1_R_a_1;
  R42: R_a + A_p1_U_p2_P_1_p3_U_L_a_1 => A_p1_U_1_p2_P_2_p3_U_L_a_2_R_a_1; cell*kOnR*R_a*A_p1_U_p2_P_1_p3_U_L_a_1;
  R43: R_a + A_p1_U_p2_U_p3_P_1_L_a_1 => A_p1_U_1_p2_U_p3_P_2_L_a_2_R_a_1; cell*kOnR*R_a*A_p1_U_p2_U_p3_P_1_L_a_1;
  R44: S13 => R_a + A_p1_U_p2_U_1_p3_U_2_R_a_1_R_a_2; cell*kOffR*S13;
  R45: A_p1_U_1_p2_P_p3_U_R_a_1 => R_a + A_p1_U_p2_P_p3_U; cell*kOffR*A_p1_U_1_p2_P_p3_U_R_a_1;
  R46: A_p1_U_1_p2_U_p3_P_R_a_1 => R_a + A_p1_U_p2_U_p3_P; cell*kOffR*A_p1_U_1_p2_U_p3_P_R_a_1;
  R47: S13 => R_a + A_p1_P_p2_U_1_p3_U_2_R_a_1_R_a_2; cell*kCatR*S13;
  R48: A_p1_U_1_p2_P_p3_U_R_a_1 => R_a + A_p1_P_p2_P_p3_U; cell*kCatR*A_p1_U_1_p2_P_p3_U_R_a_1;
  R49: A_p1_U_1_p2_U_p3_P_R_a_1 => R_a + A_p1_P_p2_U_p3_P; cell*kCatR*A_p1_U_1_p2_U_p3_P_R_a_1;
  R50: L_a + A_p1_P_p2_U_1_p3_U_R_a_1 => A_p1_P_1_p2_U_2_p3_U_L_a_1_R_a_2; cell*kOnL*L_a*A_p1_P_p2_U_1_p3_U_R_a_1;
  R51: L_a + A_p1_P_p2_U_p3_U_1_R_a_1 => A_p1_P_1_p2_U_p3_U_2_L_a_1_R_a_2; cell*kOnL*L_a*A_p1_P_p2_U_p3_U_1_R_a_1;
  R52: A_p1_P_1_p2_U_p3_U_L_a_1 => L_a + A_p1_P_p2_U_p3_U; cell*kOffL*A_p1_P_1_p2_U_p3_U_L_a_1;
  R53: A_p1_P_1_p2_U_p3_U_L_a_1 => L_a + A_p1_U_p2_U_p3_U; cell*kCatL*A_p1_P_1_p2_U_p3_U_L_a_1;
  R54: R_a + A_p1_U_1_p2_U_p3_P_R_a_1 => A_p1_U_1_p2_U_2_p3_P_R_a_1_R_a_2; cell*kOnR*R_a*A_p1_U_1_p2_U_p3_P_R_a_1;
  R55: R_a + A_p1_P_p2_U_p3_U_1_R_a_1 => A_p1_P_p2_U_1_p3_U_2_R_a_1_R_a_2; cell*kOnR*R_a*A_p1_P_p2_U_p3_U_1_R_a_1;
  R56: R_a + A_p1_P_1_p2_U_p3_U_L_a_1 => A_p1_P_1_p2_U_2_p3_U_L_a_1_R_a_2; cell*kOnR*R_a*A_p1_P_1_p2_U_p3_U_L_a_1;
  R57: R_a + A_p1_U_p2_U_p3_P_1_L_a_1 => A_p1_U_p2_U_1_p3_P_2_L_a_2_R_a_1; cell*kOnR*R_a*A_p1_U_p2_U_p3_P_1_L_a_1;
  R58: S13 => R_a + A_p1_U_1_p2_U_p3_U_2_R_a_1_R_a_2; cell*kOffR*S13;
  R59: A_p1_P_p2_U_1_p3_U_R_a_1 => R_a + A_p1_P_p2_U_p3_U; cell*kOffR*A_p1_P_p2_U_1_p3_U_R_a_1;
  R60: A_p1_U_p2_U_1_p3_P_R_a_1 => R_a + A_p1_U_p2_U_p3_P; cell*kOffR*A_p1_U_p2_U_1_p3_P_R_a_1;
  R61: S13 => R_a + A_p1_U_1_p2_P_p3_U_2_R_a_1_R_a_2; cell*kCatR*S13;
  R62: A_p1_P_p2_U_1_p3_U_R_a_1 => R_a + A_p1_P_p2_P_p3_U; cell*kCatR*A_p1_P_p2_U_1_p3_U_R_a_1;
  R63: A_p1_U_p2_U_1_p3_P_R_a_1 => R_a + A_p1_U_p2_P_p3_P; cell*kCatR*A_p1_U_p2_U_1_p3_P_R_a_1;
  R64: L_a + A_p1_U_1_p2_P_p3_U_R_a_1 => A_p1_U_1_p2_P_2_p3_U_L_a_2_R_a_1; cell*kOnL*L_a*A_p1_U_1_p2_P_p3_U_R_a_1;
  R65: L_a + A_p1_U_p2_P_p3_U_1_R_a_1 => A_p1_U_p2_P_1_p3_U_2_L_a_1_R_a_2; cell*kOnL*L_a*A_p1_U_p2_P_p3_U_1_R_a_1;
  R66: A_p1_U_p2_P_1_p3_U_L_a_1 => L_a + A_p1_U_p2_P_p3_U; cell*kOffL*A_p1_U_p2_P_1_p3_U_L_a_1;
  R67: A_p1_U_p2_P_1_p3_U_L_a_1 => L_a + A_p1_U_p2_U_p3_U; cell*kCatL*A_p1_U_p2_P_1_p3_U_L_a_1;
  R68: R_a + A_p1_U_1_p2_P_p3_U_R_a_1 => A_p1_U_1_p2_P_p3_U_2_R_a_1_R_a_2; cell*kOnR*R_a*A_p1_U_1_p2_P_p3_U_R_a_1;
  R69: R_a + A_p1_P_p2_U_1_p3_U_R_a_1 => A_p1_P_p2_U_1_p3_U_2_R_a_1_R_a_2; cell*kOnR*R_a*A_p1_P_p2_U_1_p3_U_R_a_1;
  R70: R_a + A_p1_P_1_p2_U_p3_U_L_a_1 => A_p1_P_1_p2_U_p3_U_2_L_a_1_R_a_2; cell*kOnR*R_a*A_p1_P_1_p2_U_p3_U_L_a_1;
  R71: R_a + A_p1_U_p2_P_1_p3_U_L_a_1 => A_p1_U_p2_P_1_p3_U_2_L_a_1_R_a_2; cell*kOnR*R_a*A_p1_U_p2_P_1_p3_U_L_a_1;
  R72: S13 => R_a + A_p1_U_1_p2_U_2_p3_U_R_a_1_R_a_2; cell*kOffR*S13;
  R73: A_p1_P_p2_U_p3_U_1_R_a_1 => R_a + A_p1_P_p2_U_p3_U; cell*kOffR*A_p1_P_p2_U_p3_U_1_R_a_1;
  R74: A_p1_U_p2_P_p3_U_1_R_a_1 => R_a + A_p1_U_p2_P_p3_U; cell*kOffR*A_p1_U_p2_P_p3_U_1_R_a_1;
  R75: S13 => R_a + A_p1_U_1_p2_U_2_p3_P_R_a_1_R_a_2; cell*kCatR*S13;
  R76: A_p1_P_p2_U_p3_U_1_R_a_1 => R_a + A_p1_P_p2_U_p3_P; cell*kCatR*A_p1_P_p2_U_p3_U_1_R_a_1;
  R77: A_p1_U_p2_P_p3_U_1_R_a_1 => R_a + A_p1_U_p2_P_p3_P; cell*kCatR*A_p1_U_p2_P_p3_U_1_R_a_1;
  R78: L_a + A_p1_U_1_p2_U_p3_P_R_a_1 => A_p1_U_1_p2_U_p3_P_2_L_a_2_R_a_1; cell*kOnL*L_a*A_p1_U_1_p2_U_p3_P_R_a_1;
  R79: L_a + A_p1_U_p2_U_1_p3_P_R_a_1 => A_p1_U_p2_U_1_p3_P_2_L_a_2_R_a_1; cell*kOnL*L_a*A_p1_U_p2_U_1_p3_P_R_a_1;
  R80: A_p1_U_p2_U_p3_P_1_L_a_1 => L_a + A_p1_U_p2_U_p3_P; cell*kOffL*A_p1_U_p2_U_p3_P_1_L_a_1;
  R81: A_p1_U_p2_U_p3_P_1_L_a_1 => L_a + A_p1_U_p2_U_p3_U; cell*kCatL*A_p1_U_p2_U_p3_P_1_L_a_1;
  R82: R_a + A_p1_U_p2_U_1_p3_P_2_L_a_2_R_a_1 => S35; cell*kOnR*R_a*A_p1_U_p2_U_1_p3_P_2_L_a_2_R_a_1;
  R83: R_a + A_p1_U_p2_P_p3_P => A_p1_U_1_p2_P_p3_P_R_a_1; cell*kOnR*R_a*A_p1_U_p2_P_p3_P;
  R84: R_a + A_p1_U_p2_P_1_p3_U_2_L_a_1_R_a_2 => S37; cell*kOnR*R_a*A_p1_U_p2_P_1_p3_U_2_L_a_1_R_a_2;
  R85: A_p1_U_1_p2_U_2_p3_P_R_a_1_R_a_2 => R_a + A_p1_U_p2_U_1_p3_P_R_a_1; cell*kOffR*A_p1_U_1_p2_U_2_p3_P_R_a_1_R_a_2;
  R86: A_p1_U_1_p2_P_p3_U_2_R_a_1_R_a_2 => R_a + A_p1_U_p2_P_p3_U_1_R_a_1; cell*kOffR*A_p1_U_1_p2_P_p3_U_2_R_a_1_R_a_2;
  R87: A_p1_U_1_p2_P_2_p3_U_L_a_2_R_a_1 => R_a + A_p1_U_p2_P_1_p3_U_L_a_1; cell*kOffR*A_p1_U_1_p2_P_2_p3_U_L_a_2_R_a_1;
  R88: A_p1_U_1_p2_U_p3_P_2_L_a_2_R_a_1 => R_a + A_p1_U_p2_U_p3_P_1_L_a_1; cell*kOffR*A_p1_U_1_p2_U_p3_P_2_L_a_2_R_a_1;
  R89: A_p1_U_1_p2_U_2_p3_P_R_a_1_R_a_2 => R_a + A_p1_P_p2_U_1_p3_P_R_a_1; cell*kCatR*A_p1_U_1_p2_U_2_p3_P_R_a_1_R_a_2;
  R90: A_p1_U_1_p2_P_p3_U_2_R_a_1_R_a_2 => R_a + A_p1_P_p2_P_p3_U_1_R_a_1; cell*kCatR*A_p1_U_1_p2_P_p3_U_2_R_a_1_R_a_2;
  R91: A_p1_U_1_p2_P_2_p3_U_L_a_2_R_a_1 => R_a + A_p1_P_p2_P_1_p3_U_L_a_1; cell*kCatR*A_p1_U_1_p2_P_2_p3_U_L_a_2_R_a_1;
  R92: A_p1_U_1_p2_U_p3_P_2_L_a_2_R_a_1 => R_a + A_p1_P_p2_U_p3_P_1_L_a_1; cell*kCatR*A_p1_U_1_p2_U_p3_P_2_L_a_2_R_a_1;
  R93: L_a + A_p1_P_p2_U_1_p3_U_2_R_a_1_R_a_2 => S42; cell*kOnL*L_a*A_p1_P_p2_U_1_p3_U_2_R_a_1_R_a_2;
  R94: L_a + A_p1_P_p2_P_p3_U => A_p1_P_1_p2_P_p3_U_L_a_1; cell*kOnL*L_a*A_p1_P_p2_P_p3_U;
  R95: L_a + A_p1_P_p2_U_p3_P => A_p1_P_1_p2_U_p3_P_L_a_1; cell*kOnL*L_a*A_p1_P_p2_U_p3_P;
  R96: A_p1_P_1_p2_U_2_p3_U_L_a_1_R_a_2 => L_a + A_p1_P_p2_U_1_p3_U_R_a_1; cell*kOffL*A_p1_P_1_p2_U_2_p3_U_L_a_1_R_a_2;
  R97: A_p1_P_1_p2_U_p3_U_2_L_a_1_R_a_2 => L_a + A_p1_P_p2_U_p3_U_1_R_a_1; cell*kOffL*A_p1_P_1_p2_U_p3_U_2_L_a_1_R_a_2;
  R98: A_p1_P_1_p2_U_2_p3_U_L_a_1_R_a_2 => L_a + A_p1_U_p2_U_1_p3_U_R_a_1; cell*kCatL*A_p1_P_1_p2_U_2_p3_U_L_a_1_R_a_2;
  R99: A_p1_P_1_p2_U_p3_U_2_L_a_1_R_a_2 => L_a + A_p1_U_p2_U_p3_U_1_R_a_1; cell*kCatL*A_p1_P_1_p2_U_p3_U_2_L_a_1_R_a_2;
  R100: R_a + A_p1_U_1_p2_U_p3_P_2_L_a_2_R_a_1 => S35; cell*kOnR*R_a*A_p1_U_1_p2_U_p3_P_2_L_a_2_R_a_1;
  R101: R_a + A_p1_P_p2_U_p3_P => A_p1_P_p2_U_1_p3_P_R_a_1; cell*kOnR*R_a*A_p1_P_p2_U_p3_P;
  R102: R_a + A_p1_P_1_p2_U_p3_U_2_L_a_1_R_a_2 => S42; cell*kOnR*R_a*A_p1_P_1_p2_U_p3_U_2_L_a_1_R_a_2;
  R103: A_p1_U_1_p2_U_2_p3_P_R_a_1_R_a_2 => R_a + A_p1_U_1_p2_U_p3_P_R_a_1; cell*kOffR*A_p1_U_1_p2_U_2_p3_P_R_a_1_R_a_2;
  R104: A_p1_P_p2_U_1_p3_U_2_R_a_1_R_a_2 => R_a + A_p1_P_p2_U_p3_U_1_R_a_1; cell*kOffR*A_p1_P_p2_U_1_p3_U_2_R_a_1_R_a_2;
  R105: A_p1_P_1_p2_U_2_p3_U_L_a_1_R_a_2 => R_a + A_p1_P_1_p2_U_p3_U_L_a_1; cell*kOffR*A_p1_P_1_p2_U_2_p3_U_L_a_1_R_a_2;
  R106: A_p1_U_p2_U_1_p3_P_2_L_a_2_R_a_1 => R_a + A_p1_U_p2_U_p3_P_1_L_a_1; cell*kOffR*A_p1_U_p2_U_1_p3_P_2_L_a_2_R_a_1;
  R107: A_p1_U_1_p2_U_2_p3_P_R_a_1_R_a_2 => R_a + A_p1_U_1_p2_P_p3_P_R_a_1; cell*kCatR*A_p1_U_1_p2_U_2_p3_P_R_a_1_R_a_2;
  R108: A_p1_P_p2_U_1_p3_U_2_R_a_1_R_a_2 => R_a + A_p1_P_p2_P_p3_U_1_R_a_1; cell*kCatR*A_p1_P_p2_U_1_p3_U_2_R_a_1_R_a_2;
  R109: A_p1_P_1_p2_U_2_p3_U_L_a_1_R_a_2 => R_a + A_p1_P_1_p2_P_p3_U_L_a_1; cell*kCatR*A_p1_P_1_p2_U_2_p3_U_L_a_1_R_a_2;
  R110: A_p1_U_p2_U_1_p3_P_2_L_a_2_R_a_1 => R_a + A_p1_U_p2_P_p3_P_1_L_a_1; cell*kCatR*A_p1_U_p2_U_1_p3_P_2_L_a_2_R_a_1;
  R111: L_a + A_p1_U_1_p2_P_p3_U_2_R_a_1_R_a_2 => S37; cell*kOnL*L_a*A_p1_U_1_p2_P_p3_U_2_R_a_1_R_a_2;
  R112: L_a + A_p1_P_p2_P_p3_U => A_p1_P_p2_P_1_p3_U_L_a_1; cell*kOnL*L_a*A_p1_P_p2_P_p3_U;
  R113: L_a + A_p1_U_p2_P_p3_P => A_p1_U_p2_P_1_p3_P_L_a_1; cell*kOnL*L_a*A_p1_U_p2_P_p3_P;
  R114: A_p1_U_1_p2_P_2_p3_U_L_a_2_R_a_1 => L_a + A_p1_U_1_p2_P_p3_U_R_a_1; cell*kOffL*A_p1_U_1_p2_P_2_p3_U_L_a_2_R_a_1;
  R115: A_p1_U_p2_P_1_p3_U_2_L_a_1_R_a_2 => L_a + A_p1_U_p2_P_p3_U_1_R_a_1; cell*kOffL*A_p1_U_p2_P_1_p3_U_2_L_a_1_R_a_2;
  R116: A_p1_U_1_p2_P_2_p3_U_L_a_2_R_a_1 => L_a + A_p1_U_1_p2_U_p3_U_R_a_1; cell*kCatL*A_p1_U_1_p2_P_2_p3_U_L_a_2_R_a_1;
  R117: A_p1_U_p2_P_1_p3_U_2_L_a_1_R_a_2 => L_a + A_p1_U_p2_U_p3_U_1_R_a_1; cell*kCatL*A_p1_U_p2_P_1_p3_U_2_L_a_1_R_a_2;
  R118: R_a + A_p1_U_1_p2_P_2_p3_U_L_a_2_R_a_1 => S37; cell*kOnR*R_a*A_p1_U_1_p2_P_2_p3_U_L_a_2_R_a_1;
  R119: R_a + A_p1_P_p2_P_p3_U => A_p1_P_p2_P_p3_U_1_R_a_1; cell*kOnR*R_a*A_p1_P_p2_P_p3_U;
  R120: R_a + A_p1_P_1_p2_U_2_p3_U_L_a_1_R_a_2 => S42; cell*kOnR*R_a*A_p1_P_1_p2_U_2_p3_U_L_a_1_R_a_2;
  R121: A_p1_U_1_p2_P_p3_U_2_R_a_1_R_a_2 => R_a + A_p1_U_1_p2_P_p3_U_R_a_1; cell*kOffR*A_p1_U_1_p2_P_p3_U_2_R_a_1_R_a_2;
  R122: A_p1_P_p2_U_1_p3_U_2_R_a_1_R_a_2 => R_a + A_p1_P_p2_U_1_p3_U_R_a_1; cell*kOffR*A_p1_P_p2_U_1_p3_U_2_R_a_1_R_a_2;
  R123: A_p1_P_1_p2_U_p3_U_2_L_a_1_R_a_2 => R_a + A_p1_P_1_p2_U_p3_U_L_a_1; cell*kOffR*A_p1_P_1_p2_U_p3_U_2_L_a_1_R_a_2;
  R124: A_p1_U_p2_P_1_p3_U_2_L_a_1_R_a_2 => R_a + A_p1_U_p2_P_1_p3_U_L_a_1; cell*kOffR*A_p1_U_p2_P_1_p3_U_2_L_a_1_R_a_2;
  R125: A_p1_U_1_p2_P_p3_U_2_R_a_1_R_a_2 => R_a + A_p1_U_1_p2_P_p3_P_R_a_1; cell*kCatR*A_p1_U_1_p2_P_p3_U_2_R_a_1_R_a_2;
  R126: A_p1_P_p2_U_1_p3_U_2_R_a_1_R_a_2 => R_a + A_p1_P_p2_U_1_p3_P_R_a_1; cell*kCatR*A_p1_P_p2_U_1_p3_U_2_R_a_1_R_a_2;
  R127: A_p1_P_1_p2_U_p3_U_2_L_a_1_R_a_2 => R_a + A_p1_P_1_p2_U_p3_P_L_a_1; cell*kCatR*A_p1_P_1_p2_U_p3_U_2_L_a_1_R_a_2;
  R128: A_p1_U_p2_P_1_p3_U_2_L_a_1_R_a_2 => R_a + A_p1_U_p2_P_1_p3_P_L_a_1; cell*kCatR*A_p1_U_p2_P_1_p3_U_2_L_a_1_R_a_2;
  R129: L_a + A_p1_U_1_p2_U_2_p3_P_R_a_1_R_a_2 => S35; cell*kOnL*L_a*A_p1_U_1_p2_U_2_p3_P_R_a_1_R_a_2;
  R130: L_a + A_p1_P_p2_U_p3_P => A_p1_P_p2_U_p3_P_1_L_a_1; cell*kOnL*L_a*A_p1_P_p2_U_p3_P;
  R131: L_a + A_p1_U_p2_P_p3_P => A_p1_U_p2_P_p3_P_1_L_a_1; cell*kOnL*L_a*A_p1_U_p2_P_p3_P;
  R132: A_p1_U_1_p2_U_p3_P_2_L_a_2_R_a_1 => L_a + A_p1_U_1_p2_U_p3_P_R_a_1; cell*kOffL*A_p1_U_1_p2_U_p3_P_2_L_a_2_R_a_1;
  R133: A_p1_U_p2_U_1_p3_P_2_L_a_2_R_a_1 => L_a + A_p1_U_p2_U_1_p3_P_R_a_1; cell*kOffL*A_p1_U_p2_U_1_p3_P_2_L_a_2_R_a_1;
  R134: A_p1_U_1_p2_U_p3_P_2_L_a_2_R_a_1 => L_a + A_p1_U_1_p2_U_p3_U_R_a_1; cell*kCatL*A_p1_U_1_p2_U_p3_P_2_L_a_2_R_a_1;
  R135: A_p1_U_p2_U_1_p3_P_2_L_a_2_R_a_1 => L_a + A_p1_U_p2_U_1_p3_U_R_a_1; cell*kCatL*A_p1_U_p2_U_1_p3_P_2_L_a_2_R_a_1;
  R136: R_a + A_p1_U_p2_P_p3_P_1_L_a_1 => A_p1_U_1_p2_P_p3_P_2_L_a_2_R_a_1; cell*kOnR*R_a*A_p1_U_p2_P_p3_P_1_L_a_1;
  R137: R_a + A_p1_U_p2_P_1_p3_P_L_a_1 => A_p1_U_1_p2_P_2_p3_P_L_a_2_R_a_1; cell*kOnR*R_a*A_p1_U_p2_P_1_p3_P_L_a_1;
  R138: S35 => R_a + A_p1_U_p2_U_1_p3_P_2_L_a_2_R_a_1; cell*kOffR*S35;
  R139: A_p1_U_1_p2_P_p3_P_R_a_1 => R_a + A_p1_U_p2_P_p3_P; cell*kOffR*A_p1_U_1_p2_P_p3_P_R_a_1;
  R140: S37 => R_a + A_p1_U_p2_P_1_p3_U_2_L_a_1_R_a_2; cell*kOffR*S37;
  R141: S35 => R_a + A_p1_P_p2_U_1_p3_P_2_L_a_2_R_a_1; cell*kCatR*S35;
  R142: A_p1_U_1_p2_P_p3_P_R_a_1 => R_a + A_p1_P_p2_P_p3_P; cell*kCatR*A_p1_U_1_p2_P_p3_P_R_a_1;
  R143: S37 => R_a + A_p1_P_p2_P_1_p3_U_2_L_a_1_R_a_2; cell*kCatR*S37;
  R144: L_a + A_p1_P_p2_U_1_p3_P_R_a_1 => A_p1_P_1_p2_U_2_p3_P_L_a_1_R_a_2; cell*kOnL*L_a*A_p1_P_p2_U_1_p3_P_R_a_1;
  R145: L_a + A_p1_P_p2_P_p3_U_1_R_a_1 => A_p1_P_1_p2_P_p3_U_2_L_a_1_R_a_2; cell*kOnL*L_a*A_p1_P_p2_P_p3_U_1_R_a_1;
  R146: L_a + A_p1_P_p2_P_1_p3_U_L_a_1 => A_p1_P_1_p2_P_2_p3_U_L_a_1_L_a_2; cell*kOnL*L_a*A_p1_P_p2_P_1_p3_U_L_a_1;
  R147: L_a + A_p1_P_p2_U_p3_P_1_L_a_1 => A_p1_P_1_p2_U_p3_P_2_L_a_1_L_a_2; cell*kOnL*L_a*A_p1_P_p2_U_p3_P_1_L_a_1;
  R148: S42 => L_a + A_p1_P_p2_U_1_p3_U_2_R_a_1_R_a_2; cell*kOffL*S42;
  R149: A_p1_P_1_p2_P_p3_U_L_a_1 => L_a + A_p1_P_p2_P_p3_U; cell*kOffL*A_p1_P_1_p2_P_p3_U_L_a_1;
  R150: A_p1_P_1_p2_U_p3_P_L_a_1 => L_a + A_p1_P_p2_U_p3_P; cell*kOffL*A_p1_P_1_p2_U_p3_P_L_a_1;
  R151: S42 => L_a + A_p1_U_p2_U_1_p3_U_2_R_a_1_R_a_2; cell*kCatL*S42;
  R152: A_p1_P_1_p2_P_p3_U_L_a_1 => L_a + A_p1_U_p2_P_p3_U; cell*kCatL*A_p1_P_1_p2_P_p3_U_L_a_1;
  R153: A_p1_P_1_p2_U_p3_P_L_a_1 => L_a + A_p1_U_p2_U_p3_P; cell*kCatL*A_p1_P_1_p2_U_p3_P_L_a_1;
  R154: R_a + A_p1_P_p2_U_p3_P_1_L_a_1 => A_p1_P_p2_U_1_p3_P_2_L_a_2_R_a_1; cell*kOnR*R_a*A_p1_P_p2_U_p3_P_1_L_a_1;
  R155: R_a + A_p1_P_1_p2_U_p3_P_L_a_1 => A_p1_P_1_p2_U_2_p3_P_L_a_1_R_a_2; cell*kOnR*R_a*A_p1_P_1_p2_U_p3_P_L_a_1;
  R156: S35 => R_a + A_p1_U_1_p2_U_p3_P_2_L_a_2_R_a_1; cell*kOffR*S35;
  R157: A_p1_P_p2_U_1_p3_P_R_a_1 => R_a + A_p1_P_p2_U_p3_P; cell*kOffR*A_p1_P_p2_U_1_p3_P_R_a_1;
  R158: S42 => R_a + A_p1_P_1_p2_U_p3_U_2_L_a_1_R_a_2; cell*kOffR*S42;
  R159: S35 => R_a + A_p1_U_1_p2_P_p3_P_2_L_a_2_R_a_1; cell*kCatR*S35;
  R160: A_p1_P_p2_U_1_p3_P_R_a_1 => R_a + A_p1_P_p2_P_p3_P; cell*kCatR*A_p1_P_p2_U_1_p3_P_R_a_1;
  R161: S42 => R_a + A_p1_P_1_p2_P_p3_U_2_L_a_1_R_a_2; cell*kCatR*S42;
  R162: L_a + A_p1_U_1_p2_P_p3_P_R_a_1 => A_p1_U_1_p2_P_2_p3_P_L_a_2_R_a_1; cell*kOnL*L_a*A_p1_U_1_p2_P_p3_P_R_a_1;
  R163: L_a + A_p1_P_p2_P_p3_U_1_R_a_1 => A_p1_P_p2_P_1_p3_U_2_L_a_1_R_a_2; cell*kOnL*L_a*A_p1_P_p2_P_p3_U_1_R_a_1;
  R164: L_a + A_p1_P_1_p2_P_p3_U_L_a_1 => A_p1_P_1_p2_P_2_p3_U_L_a_1_L_a_2; cell*kOnL*L_a*A_p1_P_1_p2_P_p3_U_L_a_1;
  R165: L_a + A_p1_U_p2_P_p3_P_1_L_a_1 => A_p1_U_p2_P_1_p3_P_2_L_a_1_L_a_2; cell*kOnL*L_a*A_p1_U_p2_P_p3_P_1_L_a_1;
  R166: S37 => L_a + A_p1_U_1_p2_P_p3_U_2_R_a_1_R_a_2; cell*kOffL*S37;
  R167: A_p1_P_p2_P_1_p3_U_L_a_1 => L_a + A_p1_P_p2_P_p3_U; cell*kOffL*A_p1_P_p2_P_1_p3_U_L_a_1;
  R168: A_p1_U_p2_P_1_p3_P_L_a_1 => L_a + A_p1_U_p2_P_p3_P; cell*kOffL*A_p1_U_p2_P_1_p3_P_L_a_1;
  R169: S37 => L_a + A_p1_U_1_p2_U_p3_U_2_R_a_1_R_a_2; cell*kCatL*S37;
  R170: A_p1_P_p2_P_1_p3_U_L_a_1 => L_a + A_p1_P_p2_U_p3_U; cell*kCatL*A_p1_P_p2_P_1_p3_U_L_a_1;
  R171: A_p1_U_p2_P_1_p3_P_L_a_1 => L_a + A_p1_U_p2_U_p3_P; cell*kCatL*A_p1_U_p2_P_1_p3_P_L_a_1;
  R172: R_a + A_p1_P_p2_P_1_p3_U_L_a_1 => A_p1_P_p2_P_1_p3_U_2_L_a_1_R_a_2; cell*kOnR*R_a*A_p1_P_p2_P_1_p3_U_L_a_1;
  R173: R_a + A_p1_P_1_p2_P_p3_U_L_a_1 => A_p1_P_1_p2_P_p3_U_2_L_a_1_R_a_2; cell*kOnR*R_a*A_p1_P_1_p2_P_p3_U_L_a_1;
  R174: S37 => R_a + A_p1_U_1_p2_P_2_p3_U_L_a_2_R_a_1; cell*kOffR*S37;
  R175: A_p1_P_p2_P_p3_U_1_R_a_1 => R_a + A_p1_P_p2_P_p3_U; cell*kOffR*A_p1_P_p2_P_p3_U_1_R_a_1;
  R176: S42 => R_a + A_p1_P_1_p2_U_2_p3_U_L_a_1_R_a_2; cell*kOffR*S42;
  R177: S37 => R_a + A_p1_U_1_p2_P_2_p3_P_L_a_2_R_a_1; cell*kCatR*S37;
  R178: A_p1_P_p2_P_p3_U_1_R_a_1 => R_a + A_p1_P_p2_P_p3_P; cell*kCatR*A_p1_P_p2_P_p3_U_1_R_a_1;
  R179: S42 => R_a + A_p1_P_1_p2_U_2_p3_P_L_a_1_R_a_2; cell*kCatR*S42;
  R180: L_a + A_p1_U_1_p2_P_p3_P_R_a_1 => A_p1_U_1_p2_P_p3_P_2_L_a_2_R_a_1; cell*kOnL*L_a*A_p1_U_1_p2_P_p3_P_R_a_1;
  R181: L_a + A_p1_P_p2_U_1_p3_P_R_a_1 => A_p1_P_p2_U_1_p3_P_2_L_a_2_R_a_1; cell*kOnL*L_a*A_p1_P_p2_U_1_p3_P_R_a_1;
  R182: L_a + A_p1_P_1_p2_U_p3_P_L_a_1 => A_p1_P_1_p2_U_p3_P_2_L_a_1_L_a_2; cell*kOnL*L_a*A_p1_P_1_p2_U_p3_P_L_a_1;
  R183: L_a + A_p1_U_p2_P_1_p3_P_L_a_1 => A_p1_U_p2_P_1_p3_P_2_L_a_1_L_a_2; cell*kOnL*L_a*A_p1_U_p2_P_1_p3_P_L_a_1;
  R184: S35 => L_a + A_p1_U_1_p2_U_2_p3_P_R_a_1_R_a_2; cell*kOffL*S35;
  R185: A_p1_P_p2_U_p3_P_1_L_a_1 => L_a + A_p1_P_p2_U_p3_P; cell*kOffL*A_p1_P_p2_U_p3_P_1_L_a_1;
  R186: A_p1_U_p2_P_p3_P_1_L_a_1 => L_a + A_p1_U_p2_P_p3_P; cell*kOffL*A_p1_U_p2_P_p3_P_1_L_a_1;
  R187: S35 => L_a + A_p1_U_1_p2_U_2_p3_U_R_a_1_R_a_2; cell*kCatL*S35;
  R188: A_p1_P_p2_U_p3_P_1_L_a_1 => L_a + A_p1_P_p2_U_p3_U; cell*kCatL*A_p1_P_p2_U_p3_P_1_L_a_1;
  R189: A_p1_U_p2_P_p3_P_1_L_a_1 => L_a + A_p1_U_p2_P_p3_U; cell*kCatL*A_p1_U_p2_P_p3_P_1_L_a_1;
  R190: R_a + A_p1_U_p2_P_1_p3_P_2_L_a_1_L_a_2 => S57; cell*kOnR*R_a*A_p1_U_p2_P_1_p3_P_2_L_a_1_L_a_2;
  R191: A_p1_U_1_p2_P_p3_P_2_L_a_2_R_a_1 => R_a + A_p1_U_p2_P_p3_P_1_L_a_1; cell*kOffR*A_p1_U_1_p2_P_p3_P_2_L_a_2_R_a_1;
  R192: A_p1_U_1_p2_P_2_p3_P_L_a_2_R_a_1 => R_a + A_p1_U_p2_P_1_p3_P_L_a_1; cell*kOffR*A_p1_U_1_p2_P_2_p3_P_L_a_2_R_a_1;
  R193: A_p1_U_1_p2_P_p3_P_2_L_a_2_R_a_1 => R_a + A_p1_P_p2_P_p3_P_1_L_a_1; cell*kCatR*A_p1_U_1_p2_P_p3_P_2_L_a_2_R_a_1;
  R194: A_p1_U_1_p2_P_2_p3_P_L_a_2_R_a_1 => R_a + A_p1_P_p2_P_1_p3_P_L_a_1; cell*kCatR*A_p1_U_1_p2_P_2_p3_P_L_a_2_R_a_1;
  R195: L_a + A_p1_P_p2_U_1_p3_P_2_L_a_2_R_a_1 => S60; cell*kOnL*L_a*A_p1_P_p2_U_1_p3_P_2_L_a_2_R_a_1;
  R196: L_a + A_p1_P_p2_P_p3_P => A_p1_P_1_p2_P_p3_P_L_a_1; cell*kOnL*L_a*A_p1_P_p2_P_p3_P;
  R197: L_a + A_p1_P_p2_P_1_p3_U_2_L_a_1_R_a_2 => S62; cell*kOnL*L_a*A_p1_P_p2_P_1_p3_U_2_L_a_1_R_a_2;
  R198: A_p1_P_1_p2_U_2_p3_P_L_a_1_R_a_2 => L_a + A_p1_P_p2_U_1_p3_P_R_a_1; cell*kOffL*A_p1_P_1_p2_U_2_p3_P_L_a_1_R_a_2;
  R199: A_p1_P_1_p2_P_p3_U_2_L_a_1_R_a_2 => L_a + A_p1_P_p2_P_p3_U_1_R_a_1; cell*kOffL*A_p1_P_1_p2_P_p3_U_2_L_a_1_R_a_2;
  R200: A_p1_P_1_p2_P_2_p3_U_L_a_1_L_a_2 => L_a + A_p1_P_p2_P_1_p3_U_L_a_1; cell*kOffL*A_p1_P_1_p2_P_2_p3_U_L_a_1_L_a_2;
  R201: A_p1_P_1_p2_U_p3_P_2_L_a_1_L_a_2 => L_a + A_p1_P_p2_U_p3_P_1_L_a_1; cell*kOffL*A_p1_P_1_p2_U_p3_P_2_L_a_1_L_a_2;
  R202: A_p1_P_1_p2_U_2_p3_P_L_a_1_R_a_2 => L_a + A_p1_U_p2_U_1_p3_P_R_a_1; cell*kCatL*A_p1_P_1_p2_U_2_p3_P_L_a_1_R_a_2;
  R203: A_p1_P_1_p2_P_p3_U_2_L_a_1_R_a_2 => L_a + A_p1_U_p2_P_p3_U_1_R_a_1; cell*kCatL*A_p1_P_1_p2_P_p3_U_2_L_a_1_R_a_2;
  R204: A_p1_P_1_p2_P_2_p3_U_L_a_1_L_a_2 => L_a + A_p1_U_p2_P_1_p3_U_L_a_1; cell*kCatL*A_p1_P_1_p2_P_2_p3_U_L_a_1_L_a_2;
  R205: A_p1_P_1_p2_U_p3_P_2_L_a_1_L_a_2 => L_a + A_p1_U_p2_U_p3_P_1_L_a_1; cell*kCatL*A_p1_P_1_p2_U_p3_P_2_L_a_1_L_a_2;
  R206: R_a + A_p1_P_1_p2_U_p3_P_2_L_a_1_L_a_2 => S60; cell*kOnR*R_a*A_p1_P_1_p2_U_p3_P_2_L_a_1_L_a_2;
  R207: A_p1_P_p2_U_1_p3_P_2_L_a_2_R_a_1 => R_a + A_p1_P_p2_U_p3_P_1_L_a_1; cell*kOffR*A_p1_P_p2_U_1_p3_P_2_L_a_2_R_a_1;
  R208: A_p1_P_1_p2_U_2_p3_P_L_a_1_R_a_2 => R_a + A_p1_P_1_p2_U_p3_P_L_a_1; cell*kOffR*A_p1_P_1_p2_U_2_p3_P_L_a_1_R_a_2;
  R209: A_p1_P_p2_U_1_p3_P_2_L_a_2_R_a_1 => R_a + A_p1_P_p2_P_p3_P_1_L_a_1; cell*kCatR*A_p1_P_p2_U_1_p3_P_2_L_a_2_R_a_1;
  R210: A_p1_P_1_p2_U_2_p3_P_L_a_1_R_a_2 => R_a + A_p1_P_1_p2_P_p3_P_L_a_1; cell*kCatR*A_p1_P_1_p2_U_2_p3_P_L_a_1_R_a_2;
  R211: L_a + A_p1_U_1_p2_P_p3_P_2_L_a_2_R_a_1 => S57; cell*kOnL*L_a*A_p1_U_1_p2_P_p3_P_2_L_a_2_R_a_1;
  R212: L_a + A_p1_P_p2_P_p3_P => A_p1_P_p2_P_1_p3_P_L_a_1; cell*kOnL*L_a*A_p1_P_p2_P_p3_P;
  R213: L_a + A_p1_P_1_p2_P_p3_U_2_L_a_1_R_a_2 => S62; cell*kOnL*L_a*A_p1_P_1_p2_P_p3_U_2_L_a_1_R_a_2;
  R214: A_p1_U_1_p2_P_2_p3_P_L_a_2_R_a_1 => L_a + A_p1_U_1_p2_P_p3_P_R_a_1; cell*kOffL*A_p1_U_1_p2_P_2_p3_P_L_a_2_R_a_1;
  R215: A_p1_P_p2_P_1_p3_U_2_L_a_1_R_a_2 => L_a + A_p1_P_p2_P_p3_U_1_R_a_1; cell*kOffL*A_p1_P_p2_P_1_p3_U_2_L_a_1_R_a_2;
  R216: A_p1_P_1_p2_P_2_p3_U_L_a_1_L_a_2 => L_a + A_p1_P_1_p2_P_p3_U_L_a_1; cell*kOffL*A_p1_P_1_p2_P_2_p3_U_L_a_1_L_a_2;
  R217: A_p1_U_p2_P_1_p3_P_2_L_a_1_L_a_2 => L_a + A_p1_U_p2_P_p3_P_1_L_a_1; cell*kOffL*A_p1_U_p2_P_1_p3_P_2_L_a_1_L_a_2;
  R218: A_p1_U_1_p2_P_2_p3_P_L_a_2_R_a_1 => L_a + A_p1_U_1_p2_U_p3_P_R_a_1; cell*kCatL*A_p1_U_1_p2_P_2_p3_P_L_a_2_R_a_1;
  R219: A_p1_P_p2_P_1_p3_U_2_L_a_1_R_a_2 => L_a + A_p1_P_p2_U_p3_U_1_R_a_1; cell*kCatL*A_p1_P_p2_P_1_p3_U_2_L_a_1_R_a_2;
  R220: A_p1_P_1_p2_P_2_p3_U_L_a_1_L_a_2 => L_a + A_p1_P_1_p2_U_p3_U_L_a_1; cell*kCatL*A_p1_P_1_p2_P_2_p3_U_L_a_1_L_a_2;
  R221: A_p1_U_p2_P_1_p3_P_2_L_a_1_L_a_2 => L_a + A_p1_U_p2_U_p3_P_1_L_a_1; cell*kCatL*A_p1_U_p2_P_1_p3_P_2_L_a_1_L_a_2;
  R222: R_a + A_p1_P_1_p2_P_2_p3_U_L_a_1_L_a_2 => S62; cell*kOnR*R_a*A_p1_P_1_p2_P_2_p3_U_L_a_1_L_a_2;
  R223: A_p1_P_p2_P_1_p3_U_2_L_a_1_R_a_2 => R_a + A_p1_P_p2_P_1_p3_U_L_a_1; cell*kOffR*A_p1_P_p2_P_1_p3_U_2_L_a_1_R_a_2;
  R224: A_p1_P_1_p2_P_p3_U_2_L_a_1_R_a_2 => R_a + A_p1_P_1_p2_P_p3_U_L_a_1; cell*kOffR*A_p1_P_1_p2_P_p3_U_2_L_a_1_R_a_2;
  R225: A_p1_P_p2_P_1_p3_U_2_L_a_1_R_a_2 => R_a + A_p1_P_p2_P_1_p3_P_L_a_1; cell*kCatR*A_p1_P_p2_P_1_p3_U_2_L_a_1_R_a_2;
  R226: A_p1_P_1_p2_P_p3_U_2_L_a_1_R_a_2 => R_a + A_p1_P_1_p2_P_p3_P_L_a_1; cell*kCatR*A_p1_P_1_p2_P_p3_U_2_L_a_1_R_a_2;
  R227: L_a + A_p1_U_1_p2_P_2_p3_P_L_a_2_R_a_1 => S57; cell*kOnL*L_a*A_p1_U_1_p2_P_2_p3_P_L_a_2_R_a_1;
  R228: L_a + A_p1_P_p2_P_p3_P => A_p1_P_p2_P_p3_P_1_L_a_1; cell*kOnL*L_a*A_p1_P_p2_P_p3_P;
  R229: L_a + A_p1_P_1_p2_U_2_p3_P_L_a_1_R_a_2 => S60; cell*kOnL*L_a*A_p1_P_1_p2_U_2_p3_P_L_a_1_R_a_2;
  R230: A_p1_U_1_p2_P_p3_P_2_L_a_2_R_a_1 => L_a + A_p1_U_1_p2_P_p3_P_R_a_1; cell*kOffL*A_p1_U_1_p2_P_p3_P_2_L_a_2_R_a_1;
  R231: A_p1_P_p2_U_1_p3_P_2_L_a_2_R_a_1 => L_a + A_p1_P_p2_U_1_p3_P_R_a_1; cell*kOffL*A_p1_P_p2_U_1_p3_P_2_L_a_2_R_a_1;
  R232: A_p1_P_1_p2_U_p3_P_2_L_a_1_L_a_2 => L_a + A_p1_P_1_p2_U_p3_P_L_a_1; cell*kOffL*A_p1_P_1_p2_U_p3_P_2_L_a_1_L_a_2;
  R233: A_p1_U_p2_P_1_p3_P_2_L_a_1_L_a_2 => L_a + A_p1_U_p2_P_1_p3_P_L_a_1; cell*kOffL*A_p1_U_p2_P_1_p3_P_2_L_a_1_L_a_2;
  R234: A_p1_U_1_p2_P_p3_P_2_L_a_2_R_a_1 => L_a + A_p1_U_1_p2_P_p3_U_R_a_1; cell*kCatL*A_p1_U_1_p2_P_p3_P_2_L_a_2_R_a_1;
  R235: A_p1_P_p2_U_1_p3_P_2_L_a_2_R_a_1 => L_a + A_p1_P_p2_U_1_p3_U_R_a_1; cell*kCatL*A_p1_P_p2_U_1_p3_P_2_L_a_2_R_a_1;
  R236: A_p1_P_1_p2_U_p3_P_2_L_a_1_L_a_2 => L_a + A_p1_P_1_p2_U_p3_U_L_a_1; cell*kCatL*A_p1_P_1_p2_U_p3_P_2_L_a_1_L_a_2;
  R237: A_p1_U_p2_P_1_p3_P_2_L_a_1_L_a_2 => L_a + A_p1_U_p2_P_1_p3_U_L_a_1; cell*kCatL*A_p1_U_p2_P_1_p3_P_2_L_a_1_L_a_2;
  R238: S57 => R_a + A_p1_U_p2_P_1_p3_P_2_L_a_1_L_a_2; cell*kOffR*S57;
  R239: S57 => R_a + A_p1_P_p2_P_1_p3_P_2_L_a_1_L_a_2; cell*kCatR*S57;
  R240: L_a + A_p1_P_p2_P_p3_P_1_L_a_1 => A_p1_P_1_p2_P_p3_P_2_L_a_1_L_a_2; cell*kOnL*L_a*A_p1_P_p2_P_p3_P_1_L_a_1;
  R241: L_a + A_p1_P_p2_P_1_p3_P_L_a_1 => A_p1_P_1_p2_P_2_p3_P_L_a_1_L_a_2; cell*kOnL*L_a*A_p1_P_p2_P_1_p3_P_L_a_1;
  R242: S60 => L_a + A_p1_P_p2_U_1_p3_P_2_L_a_2_R_a_1; cell*kOffL*S60;
  R243: A_p1_P_1_p2_P_p3_P_L_a_1 => L_a + A_p1_P_p2_P_p3_P; cell*kOffL*A_p1_P_1_p2_P_p3_P_L_a_1;
  R244: S62 => L_a + A_p1_P_p2_P_1_p3_U_2_L_a_1_R_a_2; cell*kOffL*S62;
  R245: S60 => L_a + A_p1_U_p2_U_1_p3_P_2_L_a_2_R_a_1; cell*kCatL*S60;
  R246: A_p1_P_1_p2_P_p3_P_L_a_1 => L_a + A_p1_U_p2_P_p3_P; cell*kCatL*A_p1_P_1_p2_P_p3_P_L_a_1;
  R247: S62 => L_a + A_p1_U_p2_P_1_p3_U_2_L_a_1_R_a_2; cell*kCatL*S62;
  R248: S60 => R_a + A_p1_P_1_p2_U_p3_P_2_L_a_1_L_a_2; cell*kOffR*S60;
  R249: S60 => R_a + A_p1_P_1_p2_P_p3_P_2_L_a_1_L_a_2; cell*kCatR*S60;
  R250: L_a + A_p1_P_p2_P_p3_P_1_L_a_1 => A_p1_P_p2_P_1_p3_P_2_L_a_1_L_a_2; cell*kOnL*L_a*A_p1_P_p2_P_p3_P_1_L_a_1;
  R251: L_a + A_p1_P_1_p2_P_p3_P_L_a_1 => A_p1_P_1_p2_P_2_p3_P_L_a_1_L_a_2; cell*kOnL*L_a*A_p1_P_1_p2_P_p3_P_L_a_1;
  R252: S57 => L_a + A_p1_U_1_p2_P_p3_P_2_L_a_2_R_a_1; cell*kOffL*S57;
  R253: A_p1_P_p2_P_1_p3_P_L_a_1 => L_a + A_p1_P_p2_P_p3_P; cell*kOffL*A_p1_P_p2_P_1_p3_P_L_a_1;
  R254: S62 => L_a + A_p1_P_1_p2_P_p3_U_2_L_a_1_R_a_2; cell*kOffL*S62;
  R255: S57 => L_a + A_p1_U_1_p2_U_p3_P_2_L_a_2_R_a_1; cell*kCatL*S57;
  R256: A_p1_P_p2_P_1_p3_P_L_a_1 => L_a + A_p1_P_p2_U_p3_P; cell*kCatL*A_p1_P_p2_P_1_p3_P_L_a_1;
  R257: S62 => L_a + A_p1_P_1_p2_U_p3_U_2_L_a_1_R_a_2; cell*kCatL*S62;
  R258: S62 => R_a + A_p1_P_1_p2_P_2_p3_U_L_a_1_L_a_2; cell*kOffR*S62;
  R259: S62 => R_a + A_p1_P_1_p2_P_2_p3_P_L_a_1_L_a_2; cell*kCatR*S62;
  R260: L_a + A_p1_P_p2_P_1_p3_P_L_a_1 => A_p1_P_p2_P_1_p3_P_2_L_a_1_L_a_2; cell*kOnL*L_a*A_p1_P_p2_P_1_p3_P_L_a_1;
  R261: L_a + A_p1_P_1_p2_P_p3_P_L_a_1 => A_p1_P_1_p2_P_p3_P_2_L_a_1_L_a_2; cell*kOnL*L_a*A_p1_P_1_p2_P_p3_P_L_a_1;
  R262: S57 => L_a + A_p1_U_1_p2_P_2_p3_P_L_a_2_R_a_1; cell*kOffL*S57;
  R263: A_p1_P_p2_P_p3_P_1_L_a_1 => L_a + A_p1_P_p2_P_p3_P; cell*kOffL*A_p1_P_p2_P_p3_P_1_L_a_1;
  R264: S60 => L_a + A_p1_P_1_p2_U_2_p3_P_L_a_1_R_a_2; cell*kOffL*S60;
  R265: S57 => L_a + A_p1_U_1_p2_P_2_p3_U_L_a_2_R_a_1; cell*kCatL*S57;
  R266: A_p1_P_p2_P_p3_P_1_L_a_1 => L_a + A_p1_P_p2_P_p3_U; cell*kCatL*A_p1_P_p2_P_p3_P_1_L_a_1;
  R267: S60 => L_a + A_p1_P_1_p2_U_2_p3_U_L_a_1_R_a_2; cell*kCatL*S60;
  R268: L_a + A_p1_P_p2_P_1_p3_P_2_L_a_1_L_a_2 => S66; cell*kOnL*L_a*A_p1_P_p2_P_1_p3_P_2_L_a_1_L_a_2;
  R269: A_p1_P_1_p2_P_p3_P_2_L_a_1_L_a_2 => L_a + A_p1_P_p2_P_p3_P_1_L_a_1; cell*kOffL*A_p1_P_1_p2_P_p3_P_2_L_a_1_L_a_2;
  R270: A_p1_P_1_p2_P_2_p3_P_L_a_1_L_a_2 => L_a + A_p1_P_p2_P_1_p3_P_L_a_1; cell*kOffL*A_p1_P_1_p2_P_2_p3_P_L_a_1_L_a_2;
  R271: A_p1_P_1_p2_P_p3_P_2_L_a_1_L_a_2 => L_a + A_p1_U_p2_P_p3_P_1_L_a_1; cell*kCatL*A_p1_P_1_p2_P_p3_P_2_L_a_1_L_a_2;
  R272: A_p1_P_1_p2_P_2_p3_P_L_a_1_L_a_2 => L_a + A_p1_U_p2_P_1_p3_P_L_a_1; cell*kCatL*A_p1_P_1_p2_P_2_p3_P_L_a_1_L_a_2;
  R273: L_a + A_p1_P_1_p2_P_p3_P_2_L_a_1_L_a_2 => S66; cell*kOnL*L_a*A_p1_P_1_p2_P_p3_P_2_L_a_1_L_a_2;
  R274: A_p1_P_p2_P_1_p3_P_2_L_a_1_L_a_2 => L_a + A_p1_P_p2_P_p3_P_1_L_a_1; cell*kOffL*A_p1_P_p2_P_1_p3_P_2_L_a_1_L_a_2;
  R275: A_p1_P_1_p2_P_2_p3_P_L_a_1_L_a_2 => L_a + A_p1_P_1_p2_P_p3_P_L_a_1; cell*kOffL*A_p1_P_1_p2_P_2_p3_P_L_a_1_L_a_2;
  R276: A_p1_P_p2_P_1_p3_P_2_L_a_1_L_a_2 => L_a + A_p1_P_p2_U_p3_P_1_L_a_1; cell*kCatL*A_p1_P_p2_P_1_p3_P_2_L_a_1_L_a_2;
  R277: A_p1_P_1_p2_P_2_p3_P_L_a_1_L_a_2 => L_a + A_p1_P_1_p2_U_p3_P_L_a_1; cell*kCatL*A_p1_P_1_p2_P_2_p3_P_L_a_1_L_a_2;
  R278: L_a + A_p1_P_1_p2_P_2_p3_P_L_a_1_L_a_2 => S66; cell*kOnL*L_a*A_p1_P_1_p2_P_2_p3_P_L_a_1_L_a_2;
  R279: A_p1_P_p2_P_1_p3_P_2_L_a_1_L_a_2 => L_a + A_p1_P_p2_P_1_p3_P_L_a_1; cell*kOffL*A_p1_P_p2_P_1_p3_P_2_L_a_1_L_a_2;
  R280: A_p1_P_1_p2_P_p3_P_2_L_a_1_L_a_2 => L_a + A_p1_P_1_p2_P_p3_P_L_a_1; cell*kOffL*A_p1_P_1_p2_P_p3_P_2_L_a_1_L_a_2;
  R281: A_p1_P_p2_P_1_p3_P_2_L_a_1_L_a_2 => L_a + A_p1_P_p2_P_1_p3_U_L_a_1; cell*kCatL*A_p1_P_p2_P_1_p3_P_2_L_a_1_L_a_2;
  R282: A_p1_P_1_p2_P_p3_P_2_L_a_1_L_a_2 => L_a + A_p1_P_1_p2_P_p3_U_L_a_1; cell*kCatL*A_p1_P_1_p2_P_p3_P_2_L_a_1_L_a_2;
  R283: S66 => L_a + A_p1_P_p2_P_1_p3_P_2_L_a_1_L_a_2; cell*kOffL*S66;
  R284: S66 => L_a + A_p1_U_p2_P_1_p3_P_2_L_a_1_L_a_2; cell*kCatL*S66;
  R285: S66 => L_a + A_p1_P_1_p2_P_p3_P_2_L_a_1_L_a_2; cell*kOffL*S66;
  R286: S66 => L_a + A_p1_P_1_p2_U_p3_P_2_L_a_1_L_a_2; cell*kCatL*S66;
  R287: S66 => L_a + A_p1_P_1_p2_P_2_p3_P_L_a_1_L_a_2; cell*kOffL*S66;
  R288: S66 => L_a + A_p1_P_1_p2_P_2_p3_U_L_a_1_L_a_2; cell*kCatL*S66;

  // Unit definitions:
  unit substance = item;
end
